<?xml version="1.0"?>
<?xml-stylesheet type="text/xsl" href="http://jsbsim.sourceforge.net/JSBSim.xsl"?>
<fdm_config name="QUAD COMPLETE EXT" version="2.0" release="BETA" xmlns:xsi="http://www.w3.org/2001/XMLSchema-instance" xsi:noNamespaceSchemaLocation="http://jsbsim.sourceforge.net/JSBSim.xsd">

  <fileheader>
    <author>Tomaso De Ponti</author>
    <filecreationdate>07-03-2017</filecreationdate>
    <version>Version 0.9 - beta</version>
    <description>RW3C with actuator dynamics</description>
  </fileheader>

  <metrics>
    <wingarea   unit="M2">   0 </wingarea>
    <wingspan   unit="M">    0 </wingspan>
    <chord      unit="M">    0 </chord>
    <htailarea  unit="M2">   0 </htailarea>
    <htailarm   unit="M">    0 </htailarm>
    <vtailarea  unit="M2">   0 </vtailarea>
    <vtailarm   unit="M">    0 </vtailarm>
    <location   name="AERORP" unit="M">
      <x> 0 </x>
      <y> 0 </y>
      <z> 0 </z>
    </location>
    <location name="EYEPOINT" unit="M">
      <x> 0 </x>
      <y> 0 </y>
      <z> 0 </z>
    </location>
    <location name="VRP" unit="M">
      <x> 0 </x>
      <y> 0 </y>
      <z> 0 </z>
    </location>
  </metrics>

  <mass_balance>
    <ixx unit="KG*M2">  0.126323</ixx>
    <iyy unit="KG*M2">  1.064109</iyy>
    <izz unit="KG*M2">  1.00000</izz>
    <ixy unit="KG*M2">  0.0 </ixy>
    <ixz unit="KG*M2">  0.0 </ixz>
    <iyz unit="KG*M2">  0.0 </iyz>
    <emptywt unit="KG"> 7.0 </emptywt>
    <location name="CG" unit="M">
      <x> 0 </x>
      <y> 0 </y>
      <z> 0 </z>
    </location>
  </mass_balance>

  <ground_reactions>
    <contact type="STRUCTURE" name="CONTACT_FRONT">
      <location unit="M">
        <x>-0.15 </x>
        <y> 0 </y>
        <z>-0.1 </z>
      </location>
      <static_friction>  0.8 </static_friction>
      <dynamic_friction> 0.5 </dynamic_friction>
      <spring_coeff unit="N/M"> 500 </spring_coeff>
      <damping_coeff unit="N/M/SEC"> 100 </damping_coeff>
      <damping_coeff_rebound type="SQUARE" unit="N/M2/SEC2"> 1000 </damping_coeff_rebound>
      <max_steer unit="DEG"> 0.0 </max_steer>
      <brake_group> NONE </brake_group>
      <retractable>0</retractable>
    </contact>

    <contact type="STRUCTURE" name="CONTACT_BACK">
      <location unit="M">
        <x> 0.15</x>
        <y> 0   </y>
        <z>-0.1 </z>
      </location>
      <static_friction>  0.8 </static_friction>
      <dynamic_friction> 0.5 </dynamic_friction>
      <spring_coeff unit="N/M"> 500 </spring_coeff>
      <damping_coeff unit="N/M/SEC"> 100 </damping_coeff>
      <damping_coeff_rebound type="SQUARE" unit="N/M2/SEC2"> 1000 </damping_coeff_rebound>
      <max_steer unit="DEG"> 0.0 </max_steer>
      <brake_group> NONE </brake_group>
      <retractable>0</retractable>
    </contact>

    <contact type="STRUCTURE" name="CONTACT_RIGHT">
      <location unit="M">
        <x> 0.  </x>
        <y> 0.15</y>
        <z>-0.1 </z>
      </location>
      <static_friction>  0.8 </static_friction>
      <dynamic_friction> 0.5 </dynamic_friction>
      <spring_coeff unit="N/M"> 500 </spring_coeff>
      <damping_coeff unit="N/M/SEC"> 100 </damping_coeff>
      <damping_coeff_rebound type="SQUARE" unit="N/M2/SEC2"> 1000 </damping_coeff_rebound>
      <max_steer unit="DEG"> 0.0 </max_steer>
      <brake_group> NONE </brake_group>
      <retractable>0</retractable>
    </contact>

    <contact type="STRUCTURE" name="CONTACT_LEFT">
      <location unit="M">
        <x> 0.  </x>
        <y>-0.15</y>
        <z>-0.1 </z>
      </location>
      <static_friction>  0.8 </static_friction>
      <dynamic_friction> 0.5 </dynamic_friction>
      <spring_coeff unit="N/M"> 500 </spring_coeff>
      <damping_coeff unit="N/M/SEC"> 100 </damping_coeff>
      <damping_coeff_rebound type="SQUARE" unit="N/M2/SEC2"> 1000 </damping_coeff_rebound>
      <max_steer unit="DEG"> 0.0 </max_steer>
      <brake_group> NONE </brake_group>
      <retractable>0</retractable>
    </contact>
  </ground_reactions>

  <flight_control name="actuator_dynamics">
    <channel name="filtering">

      <!--First order filter represents actuator dynamics-->
      <lag_filter name="front_motor_lag">
        <input> fcs/front_motor </input>
        <c1> 10.1 </c1>
        <output> fcs/front_motor_lag</output>
      </lag_filter>
      <lag_filter name="right_motor_lag">
        <input> fcs/right_motor </input>
        <c1> 10.1 </c1>
        <output> fcs/right_motor_lag</output>
      </lag_filter>
      <lag_filter name="back_motor_lag">
        <input> fcs/back_motor </input>
        <c1> 10.1 </c1>
        <output> fcs/back_motor_lag</output>
      </lag_filter>
      <lag_filter name="left_motor_lag">
        <input> fcs/left_motor </input>
        <c1> 10.1 </c1>
        <output> fcs/left_motor_lag</output>
      </lag_filter>
      <lag_filter name="pusher_lag">
        <input> fcs/pusher </input>
        <c1> 24.07 </c1>
        <output> fcs/pusher_lag</output>
      </lag_filter>

      <!--Derivative of actuator dynamics for spinup torque-->
      <washout_filter name="front_motor_d">
        <input> fcs/front_motor </input>
        <c1> 10.1 </c1>
        <output> fcs/front_motor_d</output>
      </washout_filter>
      <washout_filter name="right_motor_d">
        <input> fcs/right_motor </input>
        <c1> 10.1 </c1>
        <output> fcs/right_motor_d</output>
      </washout_filter>
      <washout_filter name="back_motor_d">
        <input> fcs/back_motor </input>
        <c1> 10.1 </c1>
        <output> fcs/back_motor_d</output>
      </washout_filter>
      <washout_filter name="left_motor_d">
        <input> fcs/left_motor </input>
        <c1> 10.1 </c1>
        <output> fcs/left_motor_d</output>
      </washout_filter>
    </channel>
  </flight_control>

  <external_reactions>

    <property>fcs/front_motor</property>
    <property>fcs/front_motor_lag</property>
    <property>fcs/front_motor_d</property>
    <property>fcs/right_motor</property>
    <property>fcs/right_motor_lag</property>
    <property>fcs/right_motor_d</property>
    <property>fcs/back_motor</property>
    <property>fcs/back_motor_lag</property>
    <property>fcs/back_motor_d</property>
    <property>fcs/left_motor</property>
    <property>fcs/left_motor_lag</property>
    <property>fcs/left_motor_d</property>
    <!-- <property>fcs/rudder</property>
    <property>fcs/elevator</property>
    <property>fcs/aileron</property>-->
    <property>fcs/pusher</property>
    <property>fcs/pusher_lag</property>
     <!-- <property>fcs/flap</property>
    <property>fcs/skew</property> -->

    <!-- First the lift forces produced by each propeller -->

    <force name="front_motor" frame="BODY" unit="LBS">
      <function>
        <product>
          <property>fcs/front_motor_lag</property>
          <value> 8.69 </value>
        </product>
      </function>
      <location unit="M">
        <x>-0.423</x>
        <y>0</y>
        <z>0</z>
      </location>
      <direction>
        <x>0</x>
        <y>0</y>
        <z>-1</z>
      </direction>
    </force>

    <force name="right_motor" frame="BODY" unit="LBS">
      <function>
        <product>
          <property>fcs/right_motor_lag</property>
          <value> 8.69 </value>
        </product>
      </function>
      <location unit="M">
        <x>0</x>
        <y>0.408</y>
        <z>0</z>
      </location>
      <direction>
        <x>0</x>
        <y>0</y>
        <z>-1</z>
      </direction>
    </force>

    <force name="back_motor" frame="BODY" unit="LBS">
      <function>
        <product>
          <property>fcs/back_motor_lag</property>
          <value> 8.69 </value>
        </product>
      </function>
      <location unit="M">
        <x>0.423</x>
        <y>0</y>
        <z>0</z>
      </location>
      <direction>
        <x>0</x>
        <y>0</y>
        <z>-1</z>
      </direction>
    </force>

    <force name="left_motor" frame="BODY" unit="LBS">
      <function>
        <product>
          <property>fcs/left_motor_lag</property>
          <value> 8.69 </value>
        </product>
      </function>
      <location unit="M">
        <x>0</x>
        <y>-0.408</y>
        <z>0</z>
      </location>
      <direction>
        <x>0</x>
        <y>0</y>
        <z>-1</z>
      </direction>
    </force>

    <force name="pusher_motor" frame="BODY" unit="N">
      <function>
        <product>
          <property>fcs/pusher_lag</property>
          <value> 36.96 </value>
        </product>
      </function>
      <location unit="M">
        <x>0</x>
        <y>0</y>
        <z>0</z>
      </location>
      <direction>
        <x>1</x>
        <y>0</y>
        <z>0</z>
      </direction>
    </force>

    <!-- Now the moment couples -->
    <force name="front_motor_couple1" frame="BODY" unit="N">
      <function>
        <product>
          <property>fcs/front_motor_lag</property>
          <value> 10.0 </value>
        </product>
      </function>
      <location unit="M">
        <x>0</x>
        <y>0.192</y>
        <z>0</z>
      </location>
      <direction>
        <x>1</x>
        <y>0</y>
        <z>0</z>
      </direction>
    </force>

    <force name="front_motor_couple2" frame="BODY" unit="N">
      <function>
        <product>
          <property>fcs/front_motor_lag</property>
          <value> 10.0 </value>
        </product>
      </function>
      <location unit="M">
        <x>0</x>
        <y>-0.192</y>
        <z>0</z>
      </location>
      <direction>
        <x>-1</x>
        <y>0</y>
        <z>0</z>
      </direction>
    </force>

    <force name="right_motor_couple1" frame="BODY" unit="N">
      <function>
        <product>
          <property>fcs/right_motor_lag</property>
          <value> 10.0 </value>
        </product>
      </function>
      <location unit="M">
        <x>0</x>
        <y>-0.192</y>
        <z>0</z>
      </location>
      <direction>
        <x>1</x>
        <y>0</y>
        <z>0</z>
      </direction>
    </force>

    <force name="right_motor_couple2" frame="BODY" unit="N">
      <function>
        <product>
          <property>fcs/right_motor_lag</property>
          <value> 10.0 </value>
        </product>
      </function>
      <location unit="M">
        <x>0</x>
        <y>0.192</y>
        <z>0</z>
      </location>
      <direction>
        <x>-1</x>
        <y>0</y>
        <z>0</z>
      </direction>
    </force>

    <force name="back_motor_couple1" frame="BODY" unit="N">
      <function>
        <product>
          <property>fcs/back_motor_lag</property>
          <value> 10.0 </value>
        </product>
      </function>
      <location unit="M">
        <x>0</x>
        <y>0.192</y>
        <z>0</z>
      </location>
      <direction>
        <x>1</x>
        <y>0</y>
        <z>0</z>
      </direction>
    </force>

    <force name="back_motor_couple2" frame="BODY" unit="N">
      <function>
        <product>
          <property>fcs/back_motor_lag</property>
          <value> 10.0 </value>
        </product>
      </function>
      <location unit="M">
        <x>0</x>
        <y>-0.192</y>
        <z>0</z>
      </location>
      <direction>
        <x>-1</x>
        <y>0</y>
        <z>0</z>
      </direction>
    </force>

    <force name="left_motor_couple1" frame="BODY" unit="N">
      <function>
        <product>
          <property>fcs/left_motor_lag</property>
          <value> 10.0 </value>
        </product>
      </function>
      <location unit="M">
        <x>0</x>
        <y>-0.192</y>
        <z>0</z>
      </location>
      <direction>
        <x>1</x>
        <y>0</y>
        <z>0</z>
      </direction>
    </force>

    <force name="left_motor_couple2" frame="BODY" unit="N">
      <function>
        <product>
          <property>fcs/left_motor_lag</property>
          <value> 10.0 </value>
        </product>
      </function>
      <location unit="M">
        <x>0</x>
        <y>0.192</y>
        <z>0</z>
      </location>
      <direction>
        <x>-1</x>
        <y>0</y>
        <z>0</z>
      </direction>
    </force>

    <!-- Now the G2 moment couples -->
    <force name="front_motor_couple3" frame="BODY" unit="N">
      <function>
        <product>
          <property>fcs/front_motor_d</property>
          <value> 10.0 </value>
        </product>
      </function>
      <location unit="M">
        <x>0</x>
        <y>0.0096</y>
        <z>0</z>
      </location>
      <direction>
        <x>1</x>
        <y>0</y>
        <z>0</z>
      </direction>
    </force>

    <force name="front_motor_couple4" frame="BODY" unit="N">
      <function>
        <product>
          <property>fcs/front_motor_d</property>
          <value> 10.0 </value>
        </product>
      </function>
      <location unit="M">
        <x>0</x>
        <y>-0.0096</y>
        <z>0</z>
      </location>
      <direction>
        <x>-1</x>
        <y>0</y>
        <z>0</z>
      </direction>
    </force>

    <force name="right_motor_couple3" frame="BODY" unit="N">
      <function>
        <product>
          <property>fcs/right_motor_d</property>
          <value> 10.0 </value>
        </product>
      </function>
      <location unit="M">
        <x>0</x>
        <y>-0.0096</y>
        <z>0</z>
      </location>
      <direction>
        <x>1</x>
        <y>0</y>
        <z>0</z>
      </direction>
    </force>

    <force name="right_motor_couple4" frame="BODY" unit="N">
      <function>
        <product>
          <property>fcs/right_motor_d</property>
          <value> 10.0 </value>
        </product>
      </function>
      <location unit="M">
        <x>0</x>
        <y>0.0096</y>
        <z>0</z>
      </location>
      <direction>
        <x>-1</x>
        <y>0</y>
        <z>0</z>
      </direction>
    </force>

    <force name="back_motor_couple3" frame="BODY" unit="N">
      <function>
        <product>
          <property>fcs/back_motor_d</property>
          <value> 10.0 </value>
        </product>
      </function>
      <location unit="M">
        <x>0</x>
        <y>0.0096</y>
        <z>0</z>
      </location>
      <direction>
        <x>1</x>
        <y>0</y>
        <z>0</z>
      </direction>
    </force>

    <force name="back_motor_couple4" frame="BODY" unit="N">
      <function>
        <product>
          <property>fcs/back_motor_d</property>
          <value> 10.0 </value>
        </product>
      </function>
      <location unit="M">
        <x>0</x>
        <y>-0.0096</y>
        <z>0</z>
      </location>
      <direction>
        <x>-1</x>
        <y>0</y>
        <z>0</z>
      </direction>
    </force>

    <force name="left_motor_couple3" frame="BODY" unit="N">
      <function>
        <product>
          <property>fcs/left_motor_d</property>
          <value> 10.0 </value>
        </product>
      </function>
      <location unit="M">
        <x>0</x>
        <y>-0.0096</y>
        <z>0</z>
      </location>
      <direction>
        <x>1</x>
        <y>0</y>
        <z>0</z>
      </direction>
    </force>

    <force name="left_motor_couple4" frame="BODY" unit="N">
      <function>
        <product>
          <property>fcs/left_motor_d</property>
          <value> 10.0 </value>
        </product>
      </function>
      <location unit="M">
        <x>0</x>
        <y>0.0096</y>
        <z>0</z>
      </location>
      <direction>
        <x>-1</x>
        <y>0</y>
        <z>0</z>
      </direction>
    </force>
  </external_reactions>

  <propulsion/>

  <flight_control name="FGFCS"/>

  <aerodynamics>
    <axis name="DRAG">
      <function name="aero/coefficient/CD">
        <description>Drag</description>
        <product>
          <property>aero/qbar-psf</property>
          <value>47.9</value> <!-- Conversion to pascals -->
          <value>0.0151</value> <!-- CD x Area (m^2) -->
          <value>0.224808943</value> <!-- N to LBS -->
        </product>
      </function>
    </axis>

    <axis name="SIDE">
     <function name="aero/force/Side_beta">
       <description>Side force due to beta</description>
       <product>
           <property>aero/qbar-psf</property>
           <property>metrics/Sw-sqft</property>
           <property>aero/beta-rad</property>
           <value>-4</value>
       </product>
     </function>

  </axis>
  </aerodynamics>

</fdm_config>
